OpenVSP model (file version 5), 2 components.
Geometry view with OpenVSP parameter names; values to 6 digits, angles in degrees, lengths in the model's unit.
Overall bounding box: X_Min=-0.0585046 X_Len=188.143 Y_Min=-205.723 Y_Len=411.447 Z_Min=-24.2975 Z_Len=42.7079

Wing "WingGeom"
  location (X Y Z) 0 0 0, rotation 0 0 0
  symmetric about XZ
  bounding box size 188.143 411.447 42.7079
  totals: TotalSpan=411.447 TotalProjectedSpan=411.447 TotalChord=127.764 TotalArea=40000 TotalAR=4.23221
  root: chord 186.222, twist 0, NACA 4-series Camber=0.04 CamberLoc=0.4 ThickChord=0.12
  sections:
    n  Span     Root_Chord  Tip_Chord  Area     Sweep  Sweep_Location  Dihedral  Twist  Twist_Location  tip airfoil
    1  25.8033  186.222     160.884    4478.25  45     0               0         0      0.25            as above
    2  12.9017  160.884     148.215    1993.95  45     0               0         0      0.25            as above
    3  12.9017  148.215     135.547    1830.5   45     0               0         0      0.25            as above
    4  51.6067  135.547     84.8708    5687.5   45     0               0         0      0.25            as above
    5  102.51   84.8708     32.3819    6009.79  25     0               0         0      0.25            as above

Custom "BoxGroup"
  location (X Y Z) 70 0 5, rotation 0 90 0
  symmetric about XZ
  bounding box size 125 80 9.5
  Design: BoxLayout=0 GapCol=1 GapRow=1 Height=20 LayoutTrigger=0 Length=9.5 NumCol=6 NumRow=5 SquareFlag=0 Width=8
  custom script BoxGroup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

VSPAERO settings: Sref=40000 bref=411.447 cref=127.764 Xcg=110.957 Ycg=0 Zcg=0 AlphaStart=0 AlphaEnd=10 AlphaNpts=1 BetaStart=0 BetaEnd=0 BetaNpts=1 MachStart=0.7 MachEnd=0 MachNpts=1 ReCref=1.8e+09 Vinf=100 Rho=0.002377
